// COMSOL Multiphysics 5.5.0.359 model "sir_hoehle.mph"
// sir_hoelhe
// This example reproduces the results published by Michale Höhle regarding the spreading of the disease COVID-19. It is a so-called SIR-model for the spreading of viral diseases.
// Outline of the model tree

Parameters
  gamma = 1/ni_days  // Recovering rate parameter
  N = 1e6  // Population
  beta = 4.5e-7  // Infection rate parameter
  R0 = beta*N/gamma  // Basic reproduction number
  miu = fd/nd_days  // Fraction of infected that die per unit time
  ni_days = 5  // Number of days of infecteous period
  nd_days = 15  // Number of days it takes to die
  fd = 0.5/100  // Fraction of infected that die due to the disease at any moment
  I0 = 10  // Infected at t=0
  S0 = N-10  // Susceptible at t=0
  fr_R1 = 0.6  // Reduction factor for R0 t1-t2
  fr_R2 = 0.8  // Reduction factor for R0 t2-t_final
  t1 = 28  // Time before first reduction measures
  t2 = 35  // Time for second reduction measure

Functions
  step1: Step | location = t1; from = 1; to = 0; smooth = 1
  rect1: Rectangle | lower = t1; upper = t1+t2; smooth = 1
  step2: Step | location = t1+t2; smooth = 1
  an1: Analytic | funcname = beta_an; expr = (step1(x)*R0+rect1(x)*R0*fr_R1+step2(x)*R0*fr_R2)/N*gamma

Physics
  re: ReactionEng "Reaction Engineering"
    ChemistryCommonProperty.SpeciesrateUserDefinedList = I
    ActiveSpecies.SumActiveSpecies = 4
    ActiveSpecies.NumActiveVolumeSpecies = 4
    SimpropMass.Species = {S, I, R, D}
    SimpropMass.SpeciesInputType = {"Variable, from Reaction", "Variable, from Reaction", "Variable, from Reaction", "Variable, from Reaction"}
    SimpropMass.Notes = {re.R_S, re.R_I, re.R_R, re.R_D}
    inits1: SpeciesInitialValue "Initial Values 1"
      VolumetricSpecies = {D, I, R, S}
      initialValue = {0, I0, 0, S0}
      F0 = {0, 0, 0, 0}
    rch1: ReactionChem "1: S+I=>2I"
      reset = DeactivateReactionChemEvent
      formulaID = irrev_I_I_S_
      KeqNum = (re.c_I*1[m^3/mol])^2
      KeqDen = re.c_S*re.c_I*(1[m^3/mol])^2
      rIsValid = 1
      rType = irrev
      stoichArray = {-1, -1, 2}
      fwdSpecies = {S, I}
      revSpecies = I
      fwdSpeciesTags = {S, I}
      revSpeciesTags = I
      Species = {S, I, I}
      ReactionExpression = UserDefined
      formula = S+I=>2I
      kf = beta_an(t)
      r = re.kf_1*re.c_S*re.c_I
    S: SpeciesChem "Species: S"
      sisDef = 1
      specLabel = S
      h = R_const*((re.T<=re.Tlo_S)*(re.aLo6_S+re.Tlo_S*(re.aLo1_S+0.5*re.Tlo_S*(re.aLo2_S+2*re.Tlo_S*(re.aLo3_S+0.75*re.Tlo_S*(re.aLo4_S+0.8*re.Tlo_S*re.aLo5_S))/3)))+(re.T>re.Tlo_S)*(re.T<=re.Tmid_S)*(re.aLo6_S+re.T*(re.aLo1_S+0.5*re.T*(re.aLo2_S+2*re.T*(re.aLo3_S+0.75*re.T*(re.aLo4_S+0.8*re.T*re.aLo5_S))/3)))+(re.T>re.Tmid_S)*(re.T<=re.Thi_S)*(re.aHi6_S+re.T*(re.aHi1_S+0.5*re.T*(re.aHi2_S+2*re.T*(re.aHi3_S+0.75*re.T*(re.aHi4_S+0.8*re.T*re.aHi5_S))/3)))+(re.T>re.Thi_S)*(re.aHi6_S+re.Thi_S*(re.aHi1_S+0.5*re.Thi_S*(re.aHi2_S+2*re.Thi_S*(re.aHi3_S+0.75*re.Thi_S*(re.aHi4_S+0.8*re.Thi_S*re.aHi5_S))/3))))
      s = R_const*((re.T<=re.Tlo_S)*(re.aLo7_S+re.aLo1_S*log(re.T/1[K])+re.Tlo_S*(re.aLo2_S+0.5*re.Tlo_S*(re.aLo3_S+2*re.Tlo_S*(re.aLo4_S+0.75*re.Tlo_S*re.aLo5_S)/3)))+(re.T>re.Tlo_S)*(re.T<=re.Tmid_S)*(re.aLo7_S+re.aLo1_S*log(re.T/1[K])+re.T*(re.aLo2_S+0.5*re.T*(re.aLo3_S+2*re.T*(re.aLo4_S+0.75*re.T*re.aLo5_S)/3)))+(re.T>re.Tmid_S)*(re.T<=re.Thi_S)*(re.aHi7_S+re.aHi1_S*log(re.T/1[K])+re.T*(re.aHi2_S+0.5*re.T*(re.aHi3_S+2*re.T*(re.aHi4_S+0.75*re.T*re.aHi5_S)/3)))+(re.T>re.Thi_S)*(re.aHi7_S+re.aHi1_S*log(re.T/1[K])+re.Thi_S*(re.aHi2_S+0.5*re.Thi_S*(re.aHi3_S+2*re.Thi_S*(re.aHi4_S+0.75*re.Thi_S*re.aHi5_S)/3))))
      Cp = R_const*((re.T<=re.Tlo_S)*(re.aLo1_S+re.Tlo_S*(re.aLo2_S+re.Tlo_S*(re.aLo3_S+re.Tlo_S*(re.aLo4_S+re.Tlo_S*re.aLo5_S))))+(re.T>re.Tlo_S)*(re.T<=re.Tmid_S)*(re.aLo1_S+re.T*(re.aLo2_S+re.T*(re.aLo3_S+re.T*(re.aLo4_S+re.T*re.aLo5_S))))+(re.T>re.Tmid_S)*(re.T<=re.Thi_S)*(re.aHi1_S+re.T*(re.aHi2_S+re.T*(re.aHi3_S+re.T*(re.aHi4_S+re.T*re.aHi5_S))))+(re.T>re.Thi_S)*(re.aHi1_S+re.Thi_S*(re.aHi2_S+re.Thi_S*(re.aHi3_S+re.Thi_S*(re.aHi4_S+re.Thi_S*re.aHi5_S)))))
      specName = S
    I: SpeciesChem "Species: I"
      sisDef = 1
      specLabel = I
      h = R_const*((re.T<=re.Tlo_I)*(re.aLo6_I+re.Tlo_I*(re.aLo1_I+0.5*re.Tlo_I*(re.aLo2_I+2*re.Tlo_I*(re.aLo3_I+0.75*re.Tlo_I*(re.aLo4_I+0.8*re.Tlo_I*re.aLo5_I))/3)))+(re.T>re.Tlo_I)*(re.T<=re.Tmid_I)*(re.aLo6_I+re.T*(re.aLo1_I+0.5*re.T*(re.aLo2_I+2*re.T*(re.aLo3_I+0.75*re.T*(re.aLo4_I+0.8*re.T*re.aLo5_I))/3)))+(re.T>re.Tmid_I)*(re.T<=re.Thi_I)*(re.aHi6_I+re.T*(re.aHi1_I+0.5*re.T*(re.aHi2_I+2*re.T*(re.aHi3_I+0.75*re.T*(re.aHi4_I+0.8*re.T*re.aHi5_I))/3)))+(re.T>re.Thi_I)*(re.aHi6_I+re.Thi_I*(re.aHi1_I+0.5*re.Thi_I*(re.aHi2_I+2*re.Thi_I*(re.aHi3_I+0.75*re.Thi_I*(re.aHi4_I+0.8*re.Thi_I*re.aHi5_I))/3))))
      s = R_const*((re.T<=re.Tlo_I)*(re.aLo7_I+re.aLo1_I*log(re.T/1[K])+re.Tlo_I*(re.aLo2_I+0.5*re.Tlo_I*(re.aLo3_I+2*re.Tlo_I*(re.aLo4_I+0.75*re.Tlo_I*re.aLo5_I)/3)))+(re.T>re.Tlo_I)*(re.T<=re.Tmid_I)*(re.aLo7_I+re.aLo1_I*log(re.T/1[K])+re.T*(re.aLo2_I+0.5*re.T*(re.aLo3_I+2*re.T*(re.aLo4_I+0.75*re.T*re.aLo5_I)/3)))+(re.T>re.Tmid_I)*(re.T<=re.Thi_I)*(re.aHi7_I+re.aHi1_I*log(re.T/1[K])+re.T*(re.aHi2_I+0.5*re.T*(re.aHi3_I+2*re.T*(re.aHi4_I+0.75*re.T*re.aHi5_I)/3)))+(re.T>re.Thi_I)*(re.aHi7_I+re.aHi1_I*log(re.T/1[K])+re.Thi_I*(re.aHi2_I+0.5*re.Thi_I*(re.aHi3_I+2*re.Thi_I*(re.aHi4_I+0.75*re.Thi_I*re.aHi5_I)/3))))
      Cp = R_const*((re.T<=re.Tlo_I)*(re.aLo1_I+re.Tlo_I*(re.aLo2_I+re.Tlo_I*(re.aLo3_I+re.Tlo_I*(re.aLo4_I+re.Tlo_I*re.aLo5_I))))+(re.T>re.Tlo_I)*(re.T<=re.Tmid_I)*(re.aLo1_I+re.T*(re.aLo2_I+re.T*(re.aLo3_I+re.T*(re.aLo4_I+re.T*re.aLo5_I))))+(re.T>re.Tmid_I)*(re.T<=re.Thi_I)*(re.aHi1_I+re.T*(re.aHi2_I+re.T*(re.aHi3_I+re.T*(re.aHi4_I+re.T*re.aHi5_I))))+(re.T>re.Thi_I)*(re.aHi1_I+re.Thi_I*(re.aHi2_I+re.Thi_I*(re.aHi3_I+re.Thi_I*(re.aHi4_I+re.Thi_I*re.aHi5_I)))))
      ReactionTagInSpecies = {rch1, rch2, rch3}
      SpeciesrateSelection = UserDefined
      specName = I
      R = re.r_1-re.r_2-re.r_3
      Speciesrate = re.r_1-re.r_2-re.r_3
    rch2: ReactionChem "2: I=>R"
      reset = DeactivateReactionChemEvent
      formulaID = irrev_I_R_
      KeqNum = re.c_R*1[m^3/mol]
      KeqDen = re.c_I*1[m^3/mol]
      rIsValid = 1
      rType = irrev
      stoichArray = {-1, 1}
      fwdSpecies = I
      revSpecies = R
      fwdSpeciesTags = I
      revSpeciesTags = R
      Species = {I, R}
      ReactionExpression = UserDefined
      formula = I=>R
      kf = gamma
      r = re.kf_2*re.c_I
    R: SpeciesChem "Species: R"
      sisDef = 1
      specLabel = R
      h = R_const*((re.T<=re.Tlo_R)*(re.aLo6_R+re.Tlo_R*(re.aLo1_R+0.5*re.Tlo_R*(re.aLo2_R+2*re.Tlo_R*(re.aLo3_R+0.75*re.Tlo_R*(re.aLo4_R+0.8*re.Tlo_R*re.aLo5_R))/3)))+(re.T>re.Tlo_R)*(re.T<=re.Tmid_R)*(re.aLo6_R+re.T*(re.aLo1_R+0.5*re.T*(re.aLo2_R+2*re.T*(re.aLo3_R+0.75*re.T*(re.aLo4_R+0.8*re.T*re.aLo5_R))/3)))+(re.T>re.Tmid_R)*(re.T<=re.Thi_R)*(re.aHi6_R+re.T*(re.aHi1_R+0.5*re.T*(re.aHi2_R+2*re.T*(re.aHi3_R+0.75*re.T*(re.aHi4_R+0.8*re.T*re.aHi5_R))/3)))+(re.T>re.Thi_R)*(re.aHi6_R+re.Thi_R*(re.aHi1_R+0.5*re.Thi_R*(re.aHi2_R+2*re.Thi_R*(re.aHi3_R+0.75*re.Thi_R*(re.aHi4_R+0.8*re.Thi_R*re.aHi5_R))/3))))
      s = R_const*((re.T<=re.Tlo_R)*(re.aLo7_R+re.aLo1_R*log(re.T/1[K])+re.Tlo_R*(re.aLo2_R+0.5*re.Tlo_R*(re.aLo3_R+2*re.Tlo_R*(re.aLo4_R+0.75*re.Tlo_R*re.aLo5_R)/3)))+(re.T>re.Tlo_R)*(re.T<=re.Tmid_R)*(re.aLo7_R+re.aLo1_R*log(re.T/1[K])+re.T*(re.aLo2_R+0.5*re.T*(re.aLo3_R+2*re.T*(re.aLo4_R+0.75*re.T*re.aLo5_R)/3)))+(re.T>re.Tmid_R)*(re.T<=re.Thi_R)*(re.aHi7_R+re.aHi1_R*log(re.T/1[K])+re.T*(re.aHi2_R+0.5*re.T*(re.aHi3_R+2*re.T*(re.aHi4_R+0.75*re.T*re.aHi5_R)/3)))+(re.T>re.Thi_R)*(re.aHi7_R+re.aHi1_R*log(re.T/1[K])+re.Thi_R*(re.aHi2_R+0.5*re.Thi_R*(re.aHi3_R+2*re.Thi_R*(re.aHi4_R+0.75*re.Thi_R*re.aHi5_R)/3))))
      Cp = R_const*((re.T<=re.Tlo_R)*(re.aLo1_R+re.Tlo_R*(re.aLo2_R+re.Tlo_R*(re.aLo3_R+re.Tlo_R*(re.aLo4_R+re.Tlo_R*re.aLo5_R))))+(re.T>re.Tlo_R)*(re.T<=re.Tmid_R)*(re.aLo1_R+re.T*(re.aLo2_R+re.T*(re.aLo3_R+re.T*(re.aLo4_R+re.T*re.aLo5_R))))+(re.T>re.Tmid_R)*(re.T<=re.Thi_R)*(re.aHi1_R+re.T*(re.aHi2_R+re.T*(re.aHi3_R+re.T*(re.aHi4_R+re.T*re.aHi5_R))))+(re.T>re.Thi_R)*(re.aHi1_R+re.Thi_R*(re.aHi2_R+re.Thi_R*(re.aHi3_R+re.Thi_R*(re.aHi4_R+re.Thi_R*re.aHi5_R)))))
      specName = R
    rch3: ReactionChem "3: I=>D"
      reset = DeactivateReactionChemEvent
      formulaID = irrev_D_I_
      KeqNum = re.c_D*1[m^3/mol]
      KeqDen = re.c_I*1[m^3/mol]
      rIsValid = 1
      rType = irrev
      stoichArray = {-1, 1}
      fwdSpecies = I
      revSpecies = D
      fwdSpeciesTags = I
      revSpeciesTags = D
      Species = {I, D}
      formula = I=>D
      kf = miu
    D: SpeciesChem "Species: D"
      sisDef = 1
      specLabel = D
      h = R_const*((re.T<=re.Tlo_D)*(re.aLo6_D+re.Tlo_D*(re.aLo1_D+0.5*re.Tlo_D*(re.aLo2_D+2*re.Tlo_D*(re.aLo3_D+0.75*re.Tlo_D*(re.aLo4_D+0.8*re.Tlo_D*re.aLo5_D))/3)))+(re.T>re.Tlo_D)*(re.T<=re.Tmid_D)*(re.aLo6_D+re.T*(re.aLo1_D+0.5*re.T*(re.aLo2_D+2*re.T*(re.aLo3_D+0.75*re.T*(re.aLo4_D+0.8*re.T*re.aLo5_D))/3)))+(re.T>re.Tmid_D)*(re.T<=re.Thi_D)*(re.aHi6_D+re.T*(re.aHi1_D+0.5*re.T*(re.aHi2_D+2*re.T*(re.aHi3_D+0.75*re.T*(re.aHi4_D+0.8*re.T*re.aHi5_D))/3)))+(re.T>re.Thi_D)*(re.aHi6_D+re.Thi_D*(re.aHi1_D+0.5*re.Thi_D*(re.aHi2_D+2*re.Thi_D*(re.aHi3_D+0.75*re.Thi_D*(re.aHi4_D+0.8*re.Thi_D*re.aHi5_D))/3))))
      s = R_const*((re.T<=re.Tlo_D)*(re.aLo7_D+re.aLo1_D*log(re.T/1[K])+re.Tlo_D*(re.aLo2_D+0.5*re.Tlo_D*(re.aLo3_D+2*re.Tlo_D*(re.aLo4_D+0.75*re.Tlo_D*re.aLo5_D)/3)))+(re.T>re.Tlo_D)*(re.T<=re.Tmid_D)*(re.aLo7_D+re.aLo1_D*log(re.T/1[K])+re.T*(re.aLo2_D+0.5*re.T*(re.aLo3_D+2*re.T*(re.aLo4_D+0.75*re.T*re.aLo5_D)/3)))+(re.T>re.Tmid_D)*(re.T<=re.Thi_D)*(re.aHi7_D+re.aHi1_D*log(re.T/1[K])+re.T*(re.aHi2_D+0.5*re.T*(re.aHi3_D+2*re.T*(re.aHi4_D+0.75*re.T*re.aHi5_D)/3)))+(re.T>re.Thi_D)*(re.aHi7_D+re.aHi1_D*log(re.T/1[K])+re.Thi_D*(re.aHi2_D+0.5*re.Thi_D*(re.aHi3_D+2*re.Thi_D*(re.aHi4_D+0.75*re.Thi_D*re.aHi5_D)/3))))
      Cp = R_const*((re.T<=re.Tlo_D)*(re.aLo1_D+re.Tlo_D*(re.aLo2_D+re.Tlo_D*(re.aLo3_D+re.Tlo_D*(re.aLo4_D+re.Tlo_D*re.aLo5_D))))+(re.T>re.Tlo_D)*(re.T<=re.Tmid_D)*(re.aLo1_D+re.T*(re.aLo2_D+re.T*(re.aLo3_D+re.T*(re.aLo4_D+re.T*re.aLo5_D))))+(re.T>re.Tmid_D)*(re.T<=re.Thi_D)*(re.aHi1_D+re.T*(re.aHi2_D+re.T*(re.aHi3_D+re.T*(re.aHi4_D+re.T*re.aHi5_D))))+(re.T>re.Thi_D)*(re.aHi1_D+re.Thi_D*(re.aHi2_D+re.Thi_D*(re.aHi3_D+re.Thi_D*(re.aHi4_D+re.Thi_D*re.aHi5_D)))))
      specName = D

Studies
  std1 "Study 1"
    param: Parametric "Parametric Sweep"
      sweeptype = switch
      switchname = default
      switchlistarr = range(1,1,2)
      switchcase = all
    time: Transient "Time Dependent" | tlist = range(0,1,150)

Solver configurations
  sol1 "Solution 1" (study std1)
    v1: Variables "Dependent Variables 1"
    t1: Time "Time-Dependent Solver 1"
      tlist = range(0,1,150)
      rtol = 1.0E-5
      atolglobalvaluemethod = manual
      atolglobal = 1.0E-6
      tout = tsteps
      dDef: Direct
      fc1: FullyCoupled | dtech = auto
  sol2 "Parametric Solutions 1" (study std1)

Datasets
  dset1: Solution | solution = sol1
  dset2: Solution | solution = sol2

Plots
  pg1: PlotGroup1D "Total Population, Cases 1 & 2" | data = dset2; xlabel = Time (days); ylabel = Number of people
    glob1: Global
      data = dset2
      expr = {comp1.re.c_S, comp1.re.c_I, comp1.re.c_R}
      unit = {mol/m^3, mol/m^3, mol/m^3}
      descr = {Concentration, Concentration, Concentration}
      legends = {"Case 1, S", "Case 1, I", "Case 1, R"}
    glob2: Global
      data = dset2
      expr = {comp1.re.c_S, comp1.re.c_I, comp1.re.c_R}
      unit = {mol/m^3, mol/m^3, mol/m^3}
      descr = {Concentration, Concentration, Concentration}
      legends = {"Case 2, S", "Case 2, I", "Case 2, R"}
  pg2: PlotGroup1D "New Cases per Day"
    data = dset2
    xlabel = Time (days)
    ylabel = New cases per day (% of total population)
    glob1: Global | expr = comp1.re.r_1/N*100; unit = mol/(m^3*s); legends = {Case 1, Case 2}
  pg3: PlotGroup1D "Recovered cases" | data = dset2; xlabel = Time (days); ylabel = Recovered cases
    glob1: Global | expr = comp1.re.c_R; unit = mol/m^3; descr = Concentration; legends = {Case 1, Case 2}
  pg4: PlotGroup1D "Deaths" | data = dset2; xlabel = Time (days); ylabel = Deaths
    glob1: Global | expr = comp1.re.c_D; unit = mol/m^3; descr = Concentration; legends = {Case 1, Case 2}
  pg5: PlotGroup1D "Deaths per Day 1" | data = dset2; xlabel = Time (days); ylabel = Deaths per day
    glob1: Global | expr = comp1.re.r_3; unit = mol/(m^3*s); descr = Reaction rate; legends = {Case 1, Case 2}